N := 100
i := 0 .. 100
C[i] := 0
i := 0 .. 20
C[i] := 1
i := 0 .. 100
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u := 0.5
lt := 100
ht := 0.01
T := lt/ht
hx := 1
func(C) :=
    for k ∈ 1 .. T
        for i ∈ 1 .. N
            C1[i] ← C[i] - ht*u*(C[i] - C[i - 1])/hx
        for i ∈ 1 .. N
            C[i] ← C1[i]
    C
C1 := func(C)
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func1(C) :=
    for k ∈ 1 .. T
        for i ∈ 1 .. N - 1
            C1[i] ← C[i] - ht*u*(C[i + 1] - C[i - 1])/(2*hx)
        for i ∈ 1 .. N - 1
            C[i] ← C1[i]
    C
C2 := func1(C)
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func2(C) :=
    for i ∈ 1 .. N
        C1[i] ← C[i] - ht*u*(C[i] - C[i - 1])/hx
    for k ∈ 1 .. T
        for i ∈ 1 .. N
            C2[i] ← C1[i] - 2*ht*((C1[i - 1] - C[i - 1])/(2*ht) + u*(C1[i] - C1[i - 1])/hx)
        for i ∈ 1 .. N
            C[i] ← C1[i]
            C1[i] ← C2[i]
    C
C3 := func2(C)
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func3(C) :=
    for i ∈ 1 .. N
        C1[i] ← C[i] - ht*u*(C[i] - C[i - 1])/hx
    for k ∈ 1 .. T
        for i ∈ 1 .. N - 1
            C2[i] ← C1[i] - ht*((C1[i - 1] - C[i - 1])/(2*ht) + u*(C1[i + 1] + 4*C1[i] - 5*C1[i - 1])/(4*hx))
        for i ∈ 1 .. N - 1
            C[i] ← C1[i]
            C1[i] ← C2[i]
    C2
C4 := func3(C)
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