lx := 100
k := 1
lt := 20
hx := 1
ht := 0.1
x := 0 .. lx
t := 0 .. lt
func :=
    for i ∈ 0 .. 100
        T[i] ← 0
    for i ∈ 40 .. 60
        T[i] ← 1
    return T
i := 0 .. 100
T := func
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Nx := lx/hx
func2(C, lt) :=
    Nt ← lt/ht
    for p ∈ 1 .. Nt
        for i ∈ 1 .. Nx - 1
            C1[i] ← C[i] + k*ht*(C[i + 1] - 2*C[i] + C[i - 1])/hx^2
        for i ∈ 1 .. Nx - 1
            C[i] ← C1[i]
    C
B := func2(T, 0)
B1 := func2(T, 20)
B2 := func2(T, 50)
B3 := func2(T, 100)
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