N := 100
u := 0.5  # Лабораторная работа №1 Кравченко А.Г. ВПР41
i := 0 .. 100
lt := 100
C[i] := 0
ht := 0.01
i := 0 .. 20
T := lt/ht
C[i] := 1
hx := 1
i := 1 .. 100
MyFunction(C) :=
    for k ∈ 1 .. T
        for i ∈ 1 .. N
            C1[i] ← C[i] - ht*u*(C[i] - C[i - 1])/hx
        for i ∈ 1 .. N
            C[i] ← C1[i]
    C
C1 := MyFunction(C)
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MyFunction1(C) :=
    for k ∈ 1 .. T
        for i ∈ 1 .. N - 1
            C1[i] ← C[i] - ht*u*(C[i + 1] - C[i - 1])/(2*hx)
        for i ∈ 1 .. N - 1
            C[i] ← C1[i]
    C
MyFunction2(C) :=
    for i ∈ 1 .. N
        C1[i] ← C[i] - ht*u*(C[i] - C[i - 1])/hx
    for k ∈ 1 .. T
        for i ∈ 1 .. N
            C2[i] ← C1[i] - 2*ht*((C1[i - 1] - C[i - 1])/(2*ht) + u*(C1[i] - C1[i - 1])/hx)
        for i ∈ 1 .. N
            C[i] ← C1[i]
            C1[i] ← C2[i]
    C
C2 := MyFunction1(C)
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C3 := MyFunction2(C)
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MyFunction3(C) :=
    for i ∈ 1 .. N
        C1[i] ← C[i] - ht*u*(C[i] - C[i - 1])/hx
    for k ∈ 1 .. T
        for i ∈ 1 .. N - 1
            C2[i] ← C1[i] - ht*((C1[i - 1] - C[i - 1])/(2*ht) + u*(C1[i + 1] + 4*C1[i] - 5*C1[i - 1])/(4*hx))
        for i ∈ 1 .. N - 1
            C[i] ← C1[i]
            C1[i] ← C2[i]
    C2
C4 := MyFunction3(C)
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