lx := 100
k := 1  # Лабораторная работа №2 Кравченко А.Г. ВПР41
lt := 20
hx := 1
Nx := lx/hx
ht := 0.1
x := 0 .. lx
t := 0 .. lt
MyFunction2(C, lt) :=
    Nt ← lt/ht
    for p ∈ 1 .. Nt
        for i ∈ 1 .. Nx - 1
            C1[i] ← C[i] + k*ht*(C[i + 1] - 2*C[i] + C[i - 1])/hx^2
        for i ∈ 1 .. Nx - 1
            C[i] ← C1[i]
    C
MyFunction :=
    for i ∈ 0 .. 100
        T[i] ← 0
    for i ∈ 40 .. 60
        T[i] ← 1
    return T
T := MyFunction
i := 0 .. 100
B := MyFunction2(T, 0)
B1 := MyFunction2(T, 20)
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B2 := MyFunction2(T, 50)
B3 := MyFunction2(T, 100)
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