# Лабораторная работа №3 Кравченко А.Г. ВПР41
# Начальные данные:
iCount := 0 .. 100
P[iCount] := 0
iCount := 40 .. 60
P[iCount] := 1
iCount := 0 .. 100
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N := 100
K := 1
HX := 1
HT := 0.1
CalculateFunction(A, time) :=
    for k ∈ 1 .. time
        for i ∈ 0 .. N
            c[i] ← 1/HT + 2*K/HX^2
            a[i] ← K/HX^2
            b[i] ← K/HX^2
            f[i] ← A[i]/HT
        a[0] ← 0
        b[N] ← 0
        alfa[0] ← 0
        beta[0] ← 0
        for i ∈ 0 .. N - 1
            alfa[i + 1] ← b[i]/(c[i] - a[i]*alfa[i])
            beta[i + 1] ← (f[i] + a[i]*beta[i])/(c[i] - a[i]*alfa[i])
        x[N] ← beta[N]
        i ← N - 1
        while i > 1
            x[i - 1] ← beta[i] + alfa[i]*x[i]
            i ← i - 1
        A ← x
    x
Расчеты
P2 := CalculateFunction(P, 200)
P3 := CalculateFunction(P, 500)
P1 := CalculateFunction(P, 1000)
Графики
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