N := 100
ht := 0.1
k := 1
σ := 0.5
hx := 1
iCount := 0 .. 100
P[iCount] := 0
iCount := 40 .. 60
P[iCount] := 1
iCount := 0 .. 100
f(T) :=
    for j ∈ 900
        for i ∈ 1 .. N - 1
            c[i] ← 1/ht + 2*k*σ/hx^2
            b[i] ← k*σ/hx^2
            a[i] ← k*σ/hx^2
            f[i] ← T[i]/ht + (1 - σ)*(T[i + 1] - 2*T[i] + T[i - 1])/hx^2
        α[1] ← 0
        β[1] ← sin(π/100)
        for i ∈ 1 .. N - 2
            α[i + 1] ← b[i]/(c[i] - a[i]*α[i])
            β[i + 1] ← (f[i] + a[i]*β[i])/(c[i] - a[i]*α[i])
        i ← N - 1
        T[i] ← (f[i] + a[i]*β[i])/(c[i] - a[i]*α[i])
        for i ∈ N - 2 .. 0
            T[i] ← β[i + 1] + α[i + 1]*T[i + 1]
    T
TA := f(P)
i := 0 .. 100
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